# AguaClara Water Treatment Plants
# Automated Design
# Add variable descriptions next to every varible so it is easy to interpret what this all means.
# Design References
# [reference: BasicInputs3Sed3Bays.xmcd]
# Use BasicClientInputs and ExpertClientInputs when this is run by LabVIEW.
# Use BasicInputs and ExpertInputs to use the program in MathCAD
# Change the reference by
# - right clicking
# - select properties
# - reference tab
# - type in the correct file name
# [reference: ExpertInputs.xmcd]
# [reference: DesignAssumptions.xmcd]
# [reference: MathFunctions.xmcd]
# [reference: PipeDatabase.xmcd]
# [reference: MinorLossCoefficients.xmcd]
# [reference: FluidsFunctions.xmcd]
# [reference: Sedimentation Tank.xmcd]
# [reference: Floc Hopper - New Design.xmcd]
# [reference: FCM.xmcd]
# [reference: Flocculator 3.xmcd]
# [reference: RapidMixer.xmcd]
# [reference: Materials List.xmcd]
# [reference: EntranceTankDim.xmcd]
Q_Plant = 70 L/s
# Sed Tanks and Slopes:
B_SedPort = 4.05235 cm  # Height of the narrowest part of the manifold ports
N_SedTanks = 3
W_SedPort = 4.05235 cm
H_SedBetween = 0 cm  # Distance from the top of the inlet manifold to the bottom of the ledge supporting the lamella frame
A_SedPort = 16.4215 cm^2  # Port Area
L_Sed = 9.6 m
W_SedSludgeFlat = 5 cm  # Distance between tips of manifold plates (space alloted for the drain holes
N_SedBays = 3  # Number of bays of inlet manifolds in each sed tank
AN_SedTopInlet = 60 deg  # Angle of the top of the inlet manifold
L_SedPort = 4.67925 cm  # Length of the port through which water exits the inlet manifold
AN_SedBottom = 10 deg  # Angle of the bottom of inlet manifold
W_SedSlopePlate = 30 cm  # Width of ferrous cement plates in whice one manifold port is cut
Q_SedBay = 7.77778 L/s
W_SedBayActual = 0.9 m
L_SedSlopeManifold = 0.780718 m  # This is the extra distance between the last slope and the wall
# Sedimentation Tank Sludge Drain:
N_SedSludgeOrifices = 64  # per cell
Ti_SludgeDrain = 40 min  # Tank Drain time
W_SedSludge = 14.965 cm  # Width of the sludge channel
B_SedSludgeOrifices = 15 cm  # Distance center to center between drain orifices
H_SedSludge = 7.48251 cm  # Depth of the sludge channel
T_SedSludge = 7.4641 cm
T_SedSludge = 7.4641 cm
# Thickness of the plate topping the sludge channel
# through which drain holes are formed
W_SedDrainCover = 19.2376 cm
D_SedSludgeOrifice = 0.0111125 m  # Diameter of drain orifices
W_SedInletBottom = 0.353812 m
N_SedSludgeOrifices = 64
ND_SedSludgeValve = 3 in
# Sedimentation Tank Dimensions:
Z_SedSludge = 0.149466 m  # Height from 0 of the top of the sludge drain
H_SedBottomSlope = 0.065064 m  # Height of the bottom slope
H_SedTopSlope = 0.676122 m  # Height of the top of the inlet manifold
Z_SedSlopes = 0.825588 m  # Height from 0 of the top of the inlet manifold
W_Sed = 3 m  # Total tank wall height
L_Sed = 9.6 m  # Total tank length
# Inlet Channel:
HW_InletChannel = 0.617653 m  # Width of the drop chimneys connecting channel to sed inlet manifolds
W_InletChannel = 0.617653 m  # length of drop chimmneys
L_Channel = 9.6 m
W_SedManifoldEntrance = 0.2632 m
L_SedManifoldEntrance = 0.201412 m
H_SedManifoldPort = 0.309795 m  # Ports at bottom of inlet chimney are set to be triangles
W_SedManifoldPort = 0.288759 m
N_SedInletPipes = 2  # per sed bay
H_InletChannel = 0.717653 m
# Sedimentation Tank Effluent Launder:
N_SedLaunderOrifices = 164  # Number of orifices per launder
Q_SedLaunderOrifices = 2.37127e-5 m^3/s  # More Launder Dimensions
ND_SedLaunder = 6 in
B_SedLaunderOrifices = 0.1 m  # Center to center launder spacing
L_SedLaunder = 8.356 m
# Exit Channel:
D_SedLaunderOrifice = 0.3125 in
W_ExitChannel = 0.476351 m
H_ExitChannel = 0.717653 m
L_ExitChannel = 9.6 m
H_PltWeir = 0.480157 m  # height of the weir carrying water to the distribution tank
HW_ExitChannel = 0.577653 m  # water height in exit channel from 0
# Lamella:
L_SedPlate = 0.375 m
B_SedPlate = 2.15943 cm  # center to center distance between lamella
S_SedPlate = 1.7 cm  # spacing between lamella
N_SedPlates = 323  # Number of Sed Plates per Sedimentation Tank Bay.
AN_SedPlate = 60 deg
ZW_ExitChannel = 1.48514 m
V_SedC = 9.23042 m/day
L_SedActive = 6.89959 m
T
V_SedUp = 70 m/day
Z_SedLaunder = 1.401 m
H_SedPlate = 0.32476 m
H_SedAbove = 0.208275 m  # Height of water needed above the lamella
N_SedPlates = 323
HW_Sed = 1.52514 m
H_Sed = 1.62514 m
Z_Mp = 0.907489 m
N_SedPorts = 29
H_SedBayDivider = 0.895588 m
W_SedSlopePlateRemaining = 0.9 m
W_SedBayDivider = 0.15 m
# Sedimentation Tank Floc Hopper:
A_FlocHopper =  # error: This variable is undefined.
L_FlocHopper = 1 m  # Length of the hopper cement plate
L_FlocHopperOffset = 0.173912 m  # distance from the edge of the channel to the bottom of the first lamella (collection distance)
W_FlocHopper = 0.05 m  # width of the hopper set within each bay
# Flow Controller:
N_Fcm = 8
ID_FcmTube = 4.318 mm
ID_FcmTube = 0.17 in
L_FcmTube = 245.295 cm
Q_FcmTubeMax = 393.75 mL/min
HL_FcmValve = 28.8045 cm
# Flocculator: | Look at Flocculator Positioning arrays
W_FlocChannel = 1.65645 m
# Fill last channel with bafffles from last channel
# Fix port width to be based on energy dissipation in that channel
ED_Floc = [20; 2] mW/kg
# Adjust spacing after the number of baffles per channel is known.
# Check the residence time of the flocculator should be at least 20minutes
HW_FlocEnd = 1.52514 m
X_FlocBaffles = [
    0.227778, 0.5625, 0.5625;
    0.495556, 1.165, 1.165;
    0.763333, 1.7675, 1.7675;
    1.03111, 2.37, 2.37;
    1.29889, 2.9725, 2.9725;
    1.56667, 3.575, 3.575;
    1.83444, 4.1775, 4.1775;
    2.10222, 4.78, 4.78;
    2.37, 5.3825, 5.3825;
    2.63778, 5.985, 5.985
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] m
L_FlocBaffles = [
    1.67628, 1.34156, 1.34156;
    1.29736, 0.962642, 0.962642;
    1.67628, 1.34156, 1.34156;
    1.29736, 0.962642, 0.962642;
    1.67628, 1.34156, 1.34156;
    1.29736, 0.962642, 0.962642;
    1.67628, 1.34156, 1.34156;
    1.29736, 0.962642, 0.962642;
    1.67628, 1.34156, 1.34156;
    1.29736, 0.962642, 0.962642
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] m
Z_FlocBaffles = [
    0, 0, 0;
    0.227778, 0.5625, 0.5625;
    0, 0, 0;
    0.227778, 0.5625, 0.5625;
    0, 0, 0;
    0.227778, 0.5625, 0.5625;
    0, 0, 0;
    0.227778, 0.5625, 0.5625;
    0, 0, 0;
    0.227778, 0.5625, 0.5625
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] m
N_FlocChannels = 3
L_FlocTank = 28.8 m
HL_Floc = 27.8914 cm
HW_FlocStart = 1.80406 m
S_FlocBaffle = [22.7778; 56.25; 56.25] cm
B_FlocBaffle = [26.7778; 60.25; 60.25] cm
N_FlocChannelBaffles = [35; 15; 15]
W_FlocPort = [0.177778; 0.5125; 0.5125] m
HL_FlocChannels = [20.6429; 3.62424; 3.62424] cm
L_FlocBaffleLower = [1.29736; 0.962642; 0.962642] m
L_FlocBaffleUpper = [1.67628; 1.34156; 1.34156] m
H_FlocPort = [2.12232; 1.81805; 1.81805] m
Ti_Floc = 17.3233 min  # residence time of the flocculator
N_FlocBaffles = 65
# Rapid Mix Unit and Entrance Tank:
L_Et = 2.93939 m
W_Et = 2.93939 m
H_Et = 2.20406 m  # Height of Entrance Tank Orifice
W_EtOrifice[30] = 0.031 m
L_trueET[30] = 1.8097 m  # Length of Entrance Tank Orifice
Pi_EtFlow[30] = 0.278388  # Ratio of the minimum flow divided by the maximum flow through the plant.
L_FlocEntryOrifice = 165.645 cm  # Length of orifice entering into flocculator from Rapid Mix Unit
W_FlocEntryOrifice = 4.15783 cm  # Height of orifice entering into flocculator
ED_Diffusion =  # error  # Minimum Energy Dissipation needed
HL_FlocEntryOrifice = 7.86025 cm  # Head loss caused by entering flocculation tank.
A_FlocEntry = 0.0688721 m^2
A_EtOrifice = 561.006 cm^2
HW_EtTotal =  # error  # Total Height of water at beginning of rapid mix unit
HW_Channel2 =  # error  # Height of water at the back of the entrance tank channel (from channel bottom)
HW_EtChannel = 13.8292 cm  # Height of Waterfall into flocculator
W_EtChannel = 22.7778 cm  # Widt of entrance tank channel
Vol_Stock = 5670 L  # Volume of chemical stock tanks
ZW_ExitChannel = 1.48514 m  # Water Level at the end of the plant in the exit channel and exit channel box
HW_Sed = 1.52514 m
HW_FlocStart = 1.80406 m  # Water level at the beginning of the floc tank
HL_Floc = 27.8914 cm  # just for ref. the head loss throught the floc tank
HW_EtTotal =  # error  # Height of the water in the entrance channel
# Materials List:
L_LaunderPipe =  # error
N_Launders = 18
L_LaunderPipeTotal = 150.408 m
N_Valves = 9
N_LaunderCouplings = 18
N_ValveCouplings = 9
N_SedPlatesTotal = 2907
N_SedPlatesPerSheet = 8
N_SedPlateSheets = 364
N_PipeSedPlateStand =  # error
A_SedTank = 95.04 m^2
# [reference: AutoCADMasterProgram.xmcd]
# AutoCAD References
AC_SedTank = [
    "_-view o t"; "-layer m tank"; "c t 132,132,132"; "tank"; "  "; "_-view o t _zoom w 0.16,-0.16,0 -3.17714,3.16,1.6155 _box 0,0,0 -3.01714,3,1.6155 _box 0.15,-0.15,-0.15 -3.16714,3.15,1.6155 _subtract 0.15,-0.15,-0.15  0,0,0 "; "-layer s 0"; "  "; "-layer f tank"; "  "
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]
AC_EntranceTank = [
    "-layer m entrancetank";
    "c t 214,214,214";
    "entrancetank";
    "  ";
    "_-view o t _zoom w 0.16,15.29,0 -1.80786,17.25786,2.25479 _box 0,15.45,0 -1.64786,17.09786,2.25479 _box 0.15,15.3,-0.15 -1.79786,17.24786,2.25479 _subtract 0.15,15.3,-0.15  0,15.45,0 ";
    "-layer s 0";
    "  ";
    "-layer f entrancetank";
    "  ";
    "-layer s entrancetank";
    "  ";
    "_box -1.64786,15.3,2.20479 -1.38214,15.45,2.25479";
    "-layer s 0";
    "  ";
    "-layer t entrancetank";
    "  ";
    "_-view o t";
    "_subtract 0.15,15.45,0  -1.64786,15.3,2.20479 ";
    "-layer f entrancetank";
    "  "
]
AC_FlocTank = [
    "-layer m floctank"; "c t 91,91,91"; "floctank"; "  "; "_-view o t _zoom w 0.16,9.29,0 -3.17714,15.46,1.95479 _box 0,9.45,0 -3.01714,15.3,1.95479 _box 0.15,9.3,-0.15 -3.16714,15.45,1.95479 _subtract 0.15,9.3,-0.15  0,9.45,0 "; "-layer s 0"; "  "; "-layer f floctank"; "  "; "-layer m floctankwall"
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]
